# МИНОБРНАУКИ РОССИИ
# ФГБОУВО «Пензенский Государственный Университет»
# Кафедра « Информационно-вычислительные системы»
ОТЧЁТ
# по лабораторной работе №1
# «Нахождение уравнения в MathCad»
# Выполнил: ст.гр. 19ВИ1  Мельхов А.А.
# Проверил: ст.преподователь
# Голобокова Е.М
# Пенза, 2020
# Лабораторная работа №1
# Тема: «Нахождение уравнения в MathCad»
# Вариант №13
# Цель работы: нахождение корней уравнения в программе MathCad с
# использованием встроенных функций root, polyroots, символьного решения.
# Ι  Нахождение корней уравнения в программе MathCad с использованием встроенной функции root
# 1. Задаём уравнение
f(x) := x^3 - 3.335*x^2 - 1.679*x + 8.05
# 1.2 Создать цикл из точек интервала, на котором определяются корни, и
# вычислить в этих точках функцию f(х). Построить график функции f(х) и
# график функции х0=0 (т.е. ось х).
x0 := 0
x := -2, -1.9 .. 3.4
# 1.3 Построить графики для этих функций.
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# 1.4. Определить точки пересечения двух кривых f(х) и х0, которые будут
# приближением к корням уравнения
# 1.5 Задать как приближение значения точек пересечения х1, х2, х3
x1 := -1.5
x2 := 1.8
x3 := 3
# 1.6 Вычислить значение корней с помощью формул: root (f(x1),x1), root
# (f(x2),x2), root (f(x3),x3).
root(f(x1), x1) = -1.4792
root(f(x2), x2) = 1.81382
root(f(x3), x3) = 3.00038
# II Нахождение корней уравнения в программе MathCad с
# использованием встроенной функции polyroots, которая возвращает вектор,
# имеющий все корни уравнения, коэффициенты уравнения при этом задаются
# вектором.
# 1. Записать на рабочем листе MathCad вид функции f(х), для которой
# необходимо найти на заданном интервале корни.
f(x) := x^3 - 3.335*x^2 - 1.679*x + 8.05
# 2. Записать как вектор v все коэффициенты уравнения, расположить их в
# порядке увеличения степеней
v := [1; -3.335; -1.679; 8.05]
# 3. Найти корни, обратившись к встроенной функции r:=polyroots(v),
# результат будет получено относительно трансформированного вектора rT.
r := polyroots(v)
transpose(r) = [-0.676043, 0.333291, 0.551323]
# 4. Для интервала нахождения корня и количества элементов вектора rT
# создать соответствующие циклы и вычислить значение функции в точках
# цикла.
x := -2, -1.9 .. 3.4
j := 0, 1 .. 2
# 5. Построить график функции в точках цикла, а также в найденных
# точках корней, в которых функция будет иметь значения, равные нулю.
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r[j] = [-0.676043; 0.333291; 0.551323]
f(x) = [
    -9.932; -7.65825; -5.5652; -3.64685; -1.8972; -0.31025; 1.12; 2.39955; 3.5344; 4.53055
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]
# ІІІ Нахождение корней уравнения в программе MathCad с использованием символьных решений уравнений.
# 1. Ввести левую часть уравнения.
# 2. Ввести знак равенства с использованием панели управления Evaluatіon
# (Выражения) или с помощью нажатия клавиш Ctrl + =.
x^3 - 3.335*x^2 - 1.679*x + 8.05 == 0
# 3. Выделить переменную х.
# 4. Обратиться в главном меню MathCad к команде Symbolic/Variable/
# Solve.
[-1.47919661485; 3.00037642576; 1.81382018908]
# IV Найти приближенное решение вышеприведенного уравнения с
# использованием функции minerr(x1,…).
# 1. Задать приближение последовательно для первого корня х:=1
x := -1.5
# 2. Ввести ключевое слово Given (дано), с которого начинается блок
# решений.
Given
# 3. Записать уравнение, используя знак логического равенства между
# правой и левой частью уравнения.
x^3 - 3.335*x^2 - 1.679*x + 8.05 == 0
# 4. Обратиться к функции minerr(x). Корень будет найден.
Minerr(x) = -1.4792
# 5. Аналогичные действия выполнить для двух других корней уравнения,
# поскольку уравнения третьей степени имеет не больше трех корней
x := 1.8
Given
x^3 - 3.335*x^2 - 1.679*x + 8.05 == 0
Minerr(x) = 1.81382
x := 3
Given
# Вывод: научился решать уравнения MathCad
x^3 - 3.335*x^2 - 1.679*x + 8.05 == 0
Minerr(x) = 3.00038
