# МИНОБРНАУКИ РОССИИ
# ФГБОУВО «Пензенский Государственный Университет»
# Кафедра « Информационно-вычислительные системы»
ОТЧЁТ
# по лабораторной работе №2
# «Построение графиков»
# Выполнил: ст.гр. 19ВИ1  Мельхов А.А.
# Проверил: ст.преподователь
# Голобокова Е.М
# Пенза, 2020
# Лабораторная работа №2
# "Построение графиков"
# Вариант 13
# Цель работы: освоить инструментальные средства построения различных
# графиков.
# Построение графика функции y = f(x)
# Построение осуществляется с  помощью встроенных средств (вставка - график - график X-Y)
x := 0, 1 .. 10
y(x) := (x^2 - 1)/ln(x)
j(x) := x + 4
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# Построение кривой, заданной парметрически
# Построение кривой, заданной параметритчески, осуществляется аналогично.
# Отличие состоит в том, что в позиции аргумента и функции вводятся выражения или имена существующих функций.
x(t) := 6*cos(t) - 3*cos(2*t)
y(t) := 6*sin(t) - 3*sin(2*t)
t := 0, 0.1 .. 10
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# Построение графика в полярной системе координат
# В полярной системе координат каждая точка задается углом w и модулем радиуса-вектора r(w). График оюбычно строится в виде линии, которую описывает конец радиуса-вектора при изменении угла w в определённых пределах, чаще всего от 0 до 2pi.
# Перед построением таких графиков надо задать значения переменной w и функцию r(w)
t := -π, -π + π/120 .. π
y(t) := 6*sin(t) - 3*sin(2*t)
x(t) := 6*cos(t) - 3*cos(2*t)
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# График поверхности
# Трехмерные, или 3D-графики, отображают функции двух переменных вида Z(X, Y)
# Функция CreateMesh(F (или G, или f1, f2, f3), x0, x1, y0, y1, xgrid, ygrid, fmap) - создает сетку на поверхности, определённой функцией F.
# x0,x1,y0,y1 - диапазон изменения переменных; xgrid, ygrid -  размеры сетки переменных; fmap -- функция отображения
zm(a, b) := sin(a/b)*cos(b/a)
MM := CreateMesh(zm, -1.5, 1.5, -1.5, 1.5, 20, 20)
# [component: inputs MM]
# 3D точечная
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F(t) := [cos(t); sin(t); t]
M := CreateSpace(F, 0, 20, 100)
# [component: inputs M]
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x := 0 .. 10
y := 0 .. 10
f2(x, y) := 5*cos((x - y)/3)
f1(x, y) := (x + y)^2/10
M1[x, y] := f1((x - 10)/5, (y - 10)/5)
M2[x, y] := f2((x - 10)/5, (y - 10)/5)
# [component: inputs M1, M2]
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# Вывод: освоил инстументальные средства построения различных графиков, а также узнал про свойства, функцию CreateMash, CreateSpace. Познакомился с видами графиков.
