# МИНОБРНАУКИ РОССИИ
# ФГБОУВО «Пензенский Государственный Университет»
# Кафедра « Информационно-вычислительные системы»
ОТЧЁТ
# по лабораторной работе №3
# «Действия с векторами и матрицами в MathCad»
# Выполнил: ст.гр. 19ВИ1  Мельхов А.А.
# Проверил: ст.преподователь
# Голобокова Е.М
# Пенза, 2020
# Лабораторная работа №3
# Тема: «Действия с веторами и матрицами в MathCad»
# Вариант №13
# Цель работы: выполнение действий с векторами и матрицами в программе MathCad
# 1. Создать квадратные матрицы A, B, D размером (5,5,4 соответственнно) первым способом
A := [10, 5, 6, 2, 1; 9, 5, 23, 10, 1; 8, 9, 7, 2, 6; 4, 5, 1, 5, 3; 1, 6, 9, 7, 23]
B := [10, 14, 5, 7, 9; 9, 2, 7, 2, 10; 15, 3, 7, 8, 9; 31, 12, 5, 9, 4; 15, 90, 80, 24, 32]
D := [10, 8, 6, 2; 3, 4, 5, 6; 8, 91, 5, 25; 37, -11, -25, -20]
# 2. Иследовать следующие свойства матриц на примере преобразования заданных массивов:
# Транспонированная матрица суммы двух матриц равна сумме транспонированных матрицы
transpose(A + B) = [20, 18, 23, 35, 16; 19, 7, 12, 17, 96; 11, 30, 14, 6, 89; 9, 12, 10, 14, 31; 10, 11, 15, 7, 55]
transpose(A) + transpose(B) = [20, 18, 23, 35, 16; 19, 7, 12, 17, 96; 11, 30, 14, 6, 89; 9, 12, 10, 14, 31; 10, 11, 15, 7, 55]
# Транспонированная матрица произведения двух матриц равна сумме произведению траноспонированных матриц, взятых в обратном порядке
transpose(B)*transpose(A) = [
    312, 805, 418, 300, 761;
    282, 415, 715, 399, 2207;
    217, 371, 642, 327, 1985;
    170, 371, 292, 163, 706;
    234, 410, 425, 211, 914
]
transpose(A*B) = [
    312, 805, 418, 300, 761;
    282, 415, 715, 399, 2207;
    217, 371, 642, 327, 1985;
    170, 371, 292, 163, 706;
    234, 410, 425, 211, 914
]
# При транспонировании квадратной матрицы определитель не меняется:
|A| = -80652
|transpose(A)| = -80652
# Произведение квадратной матрицы на соответствующую ей квадратную дает единичную матрицу (элементы главной диагонали кдиничной матрицы равны 1, а все остальные - 0)
D*D^-1 = [1, 0, 0, 0; 0, 1, 0, 0; 0, 0, 1, 0; 0, 0, 0, 1]
# 4. Найти обратные матрицы для A.B
A^-1 = [
    0.223268, -0.0318033, -0.115075, -0.0122874, 0.0232976;
    -0.204446, 0.00479839, 0.225549, 0.0638422, -0.0584858;
    -0.044599, 0.044227, 0.0504761, -0.0885657, -0.00159946;
    -0.0023186, 0.0270421, -0.121646, 0.186666, 0.00631106;
    0.061784, -0.0254054, -0.0365645, -0.0382756, 0.0564276
]
B^-1 = [
    -0.0255809, 0.0411298, -0.0336493, 0.0457785, -0.0019169;
    0.0626375, 0.00283289, -0.0793371, 0.0165155, 0.00174706;
    -0.10568, 0.00900628, 0.0431584, 0.00366777, 0.0143114;
    0.0282774, -0.1925, 0.209222, -0.0545577, 0.000179381;
    0.0788161, 0.0946122, -0.0259034, -0.0361596, -0.00867805
]
# 5. Найти определители для матриц A, B
|A| = -80652
|B| = 1048047
# 6. Для матрицы А увеличить значения элементов в № раз, где № - номер варианта.
A := A*13
A = [
    130, 65, 78, 26, 13;
    117, 65, 299, 130, 13;
    104, 117, 91, 26, 78;
    52, 65, 13, 65, 39;
    13, 78, 117, 91, 299
]
# 7. Для матрицы В увеличить значения элементов на №.
B := B + 13
B = [
    23, 27, 18, 20, 22;
    22, 15, 20, 15, 23;
    28, 16, 20, 21, 22;
    44, 25, 18, 22, 17;
    28, 103, 93, 37, 45
]
# 8. Создать вектор C вторым способом, количество элементов которого равно 6
i := 1 .. 6
C[i] := i^2
C = [0; 1; 4; 9; 16; 25; 36]
# 9. Применить к матрицам А, В, D встроенные матричные функции (всевозможные) из приведенных в пункте “Функции для работы…..”
min(A) = 13
max(A) = 299
max(B) = 103
min(A) = 13
max(D) = 91
min(A) = 13
# 10. Применить к вектору С встроенные векторные функции.
length(C) = 7
last(C) = 6
# 11. Применить ко всем матрицам и вектору общие встроенные функции.
augment(A, B) = [
    130, 65, 78, 26, 13, 23, 27, 18, 20, 22;
    117, 65, 299, 130, 13, 22, 15, 20, 15, 23;
    104, 117, 91, 26, 78, 28, 16, 20, 21, 22;
    52, 65, 13, 65, 39, 44, 25, 18, 22, 17;
    13, 78, 117, 91, 299, 28, 103, 93, 37, 45
]
identity(5) = [1, 0, 0, 0, 0; 0, 1, 0, 0, 0; 0, 0, 1, 0, 0; 0, 0, 0, 1, 0; 0, 0, 0, 0, 1]
diag(C) = [
    0, 0, 0, 0, 0, 0, 0;
    0, 1, 0, 0, 0, 0, 0;
    0, 0, 4, 0, 0, 0, 0;
    0, 0, 0, 9, 0, 0, 0;
    0, 0, 0, 0, 16, 0, 0;
    0, 0, 0, 0, 0, 25, 0;
    0, 0, 0, 0, 0, 0, 36
]
eigenvals(B) = [143.174; -23.419; 6.35427 + 7.02657i; 6.35427 - 7.02657i; -7.46367]
rows(B) = 5
cols(B) = 5
rows(A) = 5
cols(A) = 5
rows(D) = 4
cols(D) = 4
stack(A, B) = [
    130, 65, 78, 26, 13;
    117, 65, 299, 130, 13;
    104, 117, 91, 26, 78;
    52, 65, 13, 65, 39;
    13, 78, 117, 91, 299;
    23, 27, 18, 20, 22;
    22, 15, 20, 15, 23;
    28, 16, 20, 21, 22;
    44, 25, 18, 22, 17;
    28, 103, 93, 37, 45
]
rows(C) = 7
cols(C) = 1
tr(B) = 125
rank(B) = 5
tr(A) = 650
rank(A) = 5
tr(D) = -1
rank(D) = 4
rank(C) = 1
mean(B) = 29.76
median(B) = 22
mean(A) = 87.36
median(A) = 78
eigenvals(D) = [25.4688; -4.34334 + 17.9108i; -4.34334 - 17.9108i; -17.7821]
mean(D) = 9.625
median(D) = 5.5
mean(C) = 13
median(C) = 9
eigenvals(A) = [446.992; 228.76; -123.978; 42.0474; 56.178]
submatrix(A, 1, 3, 1, 3) = [65, 299, 130; 117, 91, 26; 65, 13, 65]
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# Вывод: при выполнении лабораторной работы, научились работать с матрицами, а также  познакомились с функциями, работающих с ними.
