# МИНОБРНАУКИ РОССИИ
# ФГБОУВО «Пензенский Государственный Университет»
# Кафедра « Информационно-вычислительные системы»
ОТЧЁТ
# по лабораторной работе №4
# «Нахождение решений системы линейных и нелинейных уравнений в MathCad»
# Выполнил: ст.гр. 19ВИ1  Мельхов А.А.
# Проверил: ст.преподователь
# Голобокова Е.М
# Пенза, 2020
# Лабораторная работа №4
# Тема: «Нахождение решений системы линейных и нелинейных уравнений в MathCad»
# Вариант №13
# Цель работы: нахождение решений системы линейных и нелинейных уравнений в программе MathCad
# I Найти решение системы линейных уравнений с использованием функции soln.
# 1 Создать матрицу А из коэффициентов при неизвестных.
A := [3.7, 5.6, 9.5, 2; 4, 3.36, 31.1, 1.5; 2, 7.93, 4.2, 6.3; 2, 42.7, 3.7, 6.2]
# 2 Создать вектор b из свободных членов.
b := [13; 0; 4.4; 3]
# 3 Обратиться к встроенной программе решения линейных уравнений soln и записать soln1:=А-1*b.
soln[1] := A^-1*b
# 4 Получить решение линейного уравнения в векторном виде
soln[1] = [5.70265; -0.0519968; -0.699872; -0.579921]
# II Найти решение системы линейных уравнений с использованием так называемого «блока решений».
# 1 Задать начальные значения переменным, которые есть в уравнении.
x := 0
y := 0
z := 0
c := 0
# 2 Ввести ключевое слово Given (дано), с которого начинается блок решений.
Given
# 3 Записать уравнение, используя знак логического равенства между правой и левой частью уравнения из панели управления Evaluation (Выражения).
3.7*x + 5.6*y + 9.5*z + 2*c == 13
4*x + 3.36*y + 31.1*z + 1.5*c == 0
2*x + 7.93*y + 4.2*z + 6.3*c == 4.4
2*x + 42.7*y + 3.7*z + 6.2*c == 3
# 4 Ввести ключевое слово fіnd (найти), которым заканчивается блок решений.
Find(x, y, z, c) = [5.70265; -0.0519968; -0.699872; -0.579921]
# III Найти решение вышеприведенной системы уравнений с использованием функции lsolve.
# 1 Создать матрицу А из коэффициентов при неизвестных.
A := [3.7, 5.6, 9.5, 2; 4, 3.36, 31.1, 1.5; 2, 7.93, 4.2, 6.3; 2, 42.7, 3.7, 6.2]
# 2 Создать вектор b из свободных членов.
b := [13; 0; 4.4; 3]
# 3 Обратиться к встроенной программе решения линейных уравнений lsolve и записать lsolve(A,b).
lsolve(A, b) = [5.70265; -0.0519968; -0.699872; -0.579921]
# IV Найти решение вышеприведенной системы уравнений с использованием функции minerr (x,у,z,c).
# 1 Задать приближение последовательно для значений переменной х1, х2,… хn.
x := 0
y := 0
z := 0
c := 0
# 2 Ввести ключевое слово Given (дано), с которого начинается блок решений.
Given
# 3 Записать систему уравнений, используя знак логического равенства между правой и левой частями каждого уравнения.
3.7*x + 5.6*y + 9.5*z + 2*c == 13
4*x + 3.36*y + 31.1*z + 1.5*c == 0
2*x + 7.93*y + 4.2*z + 6.3*c == 4.4
2*x + 42.7*y + 3.7*z + 6.2*c == 3
# 4 Обратиться к функции minerr(x1,x2,..). Значения неизвестных будут найдены.
Minerr(x, y, z, c) = [5.70265; -0.0519968; -0.699872; -0.579921]
# V Найти решение системы нелинейных уравнений с использованием так называемого "блока решений".
# 1. Задать начальные значения переменным, которые есть в уравнении.
x := 1
y := 1
# 2 Ввести ключевое слово Given (дано), из которого начинается блок решений.
Given
# 3 Записать уравнение, используя знак логического равенства между правой и левой частями уравнения из панели управления.
4*x^2 + 3*y^2 == 7
8*x + 2*y == 6
# 4 Ввести ключевое слово fіnd (найти), которым заканчивается блок решений.
Find(x, y) = [0.384615; 1.46154]
# VІ. Найти приближенное решение с использованием функции mіnerr(x1,...).
# 1 Задать приближение последовательно для значений переменной х1, х2,... хn.
x := 1
y := 1
# 2 Ввести ключевое слово Given (дано), из которого начинается блок решений.
Given
# 3 Записать систему уравнений, используя знак логического равенства между правой и левой частями каждого уравнения.
4*x^2 + 3*y^2 == 7
8*x + 2*y == 6
# 4 Обратиться к функции mіnerr(x1,x2,..). Значение неизвестных будет найдено.
Minerr(x, y) = [0.384615; 1.46154]
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# Вывод: научились решать линейные и нелинейные уравнения с использованием встроенных функций, а также с помощью "блока решений".
