# МИНОБРНАУКИ РОССИИ
# ФГБОУВО «Пензенский Государственный Университет»
# Кафедра « Информационно-вычислительные системы»
ОТЧЁТ
# по лабораторной работе №5
# «Символьные действия математческого анализа в Mathcad»
# Выполнил: ст.гр. 19ВИ1  Мельхов А.А.
# Проверил: ст.преподователь
# Голобокова Е.М
# Пенза, 2020
# Лабораторная работа №5
# Тема: «Символьные действия математческого анализа в Mathcad»
# Вариант №13
# Цель работы: определение неопределённых и определённых интегралов и производных в программе MathCad с использование символьных операций.
# 1. Найьт неопределенный интеграл
integral(cos(x)/(5 + cos(x)^2), x) simplify → sqrt(6)*ln(sin(x) + sqrt(6))/12 - sqrt(6)*ln(sin(x) - sqrt(6))/12
# 2. Найти определённый интеграл
integral(1/(1 + x^2), x = -1 .. 1) simplify → π/2
# 3. Найти производную 1 порядка
d/dx(5*ln(x) + 6*acos(x) + 2*nthroot(x, 4) + 10/tan(x)) simplify → 5/x - 10*cot(x)^2 + nthroot(x, 4)/(2*x) - 6/sqrt(1 - x^2) - 10
# 4. Найти производные 2 и 3 порядка от производной 1 порядка
d^2/dx^2(5/x - 10*cot(x)^2 + nthroot(x, 4)/(2*x) - 6/sqrt(1 - x^2) - 10) simplify → 10/x^3 - 12*x^2/(1 - x^2)^(5/2) - 80*cot(x)^2 - 60*cot(x)^4 + 21*nthroot(x, 4)/(32*x^3) - 6/(1 - x^2)^(5/2) - 20
d^3/dx^3(5/x - 10*cot(x)^2 + nthroot(x, 4)/(2*x) - 6/sqrt(1 - x^2) - 10) simplify → 160*cot(x) - 36*x^3/(1 - x^2)^(7/2) - 30/x^4 + 400*cot(x)^3 + 240*cot(x)^5 - 54*x/(1 - x^2)^(7/2) - 231*nthroot(x, 4)/(128*x^4)
# Контрольные вопросы
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# Вывод: научился работать с интегралами в MathCad, а так же их решать
