# МИНОБРНАУКИ РОССИИ
# ФГБОУВО «Пензенский Государственный Университет»
# Кафедра « Информационно-вычислительные системы»
ОТЧЁТ
# по лабораторной работе №6
# «Вычисление производных в задачах геометрии и частных производных»
# Выполнил: ст.гр. 19ВИ1  Мельхов А.А.
# Проверил: ст.преподователь
# Голобокова Е.М
# Пенза, 2020
# Лабораторная работа №6
# Тема: «Вычисление производных в задачах геометрии и частных производных»
# Вариант №13
# Цель работы: вычисление проихводных в задачах геометрии и нахождение частных производных высоких порядков в программе MathCad.
# 1. Составить уравнение касательной и нормали к линии, которая задана уравнением y(x)=f(x) в точке M(x0, y0)
# 1. Задать значение x0 и y0 в точке M
x0 := 4
y0 := 0
# 2. Записать уравнение линии y(x)
y(x) := 0.5*x - sin(x)
# 3. Определить производную от функции y(x). Присвоить значение производной функции yy(x) = dy(x)
d/dx(y(x)) simplify → 0.5 - 1.0*cos(x)
yy(x) := 0.5 - 1.0*cos(x)
# 4. Записать уравнние касательной y
tang(x) := yy(x0)*(x - x0) + y0
tang(x) → (x - 4)*(-1.0*cos(4) + 0.5)
# 5. Записать уравнение нормали
norm(x) := -1*(x - x0)/yy(x0) + y0
norm(x) → -(x - 4)/(-1.0*cos(4) + 0.5)
# 6. Построить графики касательной и нормали.
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# 2. Выполнить числовое и символьное вычисление частных производных высшего порядка от функции трех переменных
# 1. Записать функцию
f(x, y, z) := z^2*e^(x*x + y*y)
# 2. Выбрать оператор дифференцирования
# 3. Заполнить оператор
d^2/dz^2(z^2*e^(x*x + y*y))
d^2/dx^2(z^2*e^(x*x + y*y))
d^2/dy^2(z^2*e^(x*x + y*y))
# 4. Нажать правой кнопкой мыши на знак оператора дифференцирования и установить флажок Частичная производная
# 5. Отметить оператор дифференцирования и обратится к панели Вычисления
8*x^3*z^2*e^(x^2 + y^2) + 12*x*z^2*e^(x^2 + y^2)
# 6. Задать числовые значения для переменных, от которых вычисляется производная
x := 0
y := 0
z := 0
px2 := 8*x^3*z^2*e^(x^2 + y^2) + 12*x*z^2*e^(x^2 + y^2)
px2 = 0
py2 := 0
py2 := 0
# Контрольные вопросы
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# Вывод: понял и научился находить нормаль и производную, а так же выполнил числовые и символьные вычисления частных производных высшего порядка.
