# МИНОБРНАУКИ РОССИИ
# ФГБОУВО «Пензенский Государственный Университет»
# Кафедра « Информационно-вычислительные системы»
ОТЧЁТ
# по лабораторной работе №7
# «Вычисление интегралов в задачах геометрии и механики»
# Выполнил: ст.гр. 19ВИ1  Мельхов А.А.
# Проверил: ст.преподователь
# Голобокова Е.М
# Пенза, 2020
# Лабораторная работа №7
# Тема: «Вычисление интегралов в задачах геометрии и механики»
# Вариант №13
# Цель работы: вычисление интегралов в задачах геометрии и механики в программе MathCad.
# I Вычислить площадь плоской фигуры ограниченной заданными линиями.
# 1 Записать ураннение кривых, которые ограничивают площадь плоской фигуры.
x1(y) := 4 - y^2
x2(y) := -2*y + 4
# 2. Найти точки их пересечения, для того чтобы использовать их у двухкратном интегрировании
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Ay := 0
Ax := 2
By := 4
Bx := 0
# 3 Обратиться на панели Символы к функции simplify.
# 4 Ввести оператор интегрирования. В соответствующих местах заполнить имя первой переменной и границы интегрирования.
# 5 На месте ввода функции под интегралом ввести еще один оператор интегрирования, границы интегрирования и подынтегральную функцию
integral(integral(1, x = -2*y + 4 .. 4 - y^2), y = 0 .. 2) simplify → 4/3
# 1 Записать ураннение кривых, которые описывают область пластины.
y1(x) := 0
y2(x) := sqrt(2*x - x^2)
# 2. Найти точки их пересечения, для того чтобы использовать их у двухкратном интегрировании
# 3 Найти площадь через двойной интеграл
Ax := 0
Bx := 2
integral(integral(1, x = 0 .. sqrt(2*x - x^2)), y = 0 .. 2) simplify → 2*sqrt(2*x - x^2)
Ay := 0
By := 0
# 4. Найти аналогично статические моменты Mx и My пластины относительно осей Ох и Оу как двойные интегралы
integral(integral(y, x = 0 .. sqrt(2*x - x^2)), y = 0 .. 2) simplify → 2*sqrt(2*x - x^2)
integral(integral(x, x = 0 .. sqrt(2*x - x^2)), y = 0 .. 2) simplify → 2*x - x^2
# 5, Определить координаты центра тяжести как отношение подынтегральной функции, которая определяет статические моменты пластины относительно осей Ох и Оу
X := (2*x - x^2)/(2*sqrt(2*x - x^2))  # error: Эта переменная не определена.
Y := 2*sqrt(2*x - x^2)/(2*sqrt(2*x - x^2))  # error: Эта переменная не определена.
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# Вывод: понял как находить площадь и координаты центра тяжести в MathCad.
