# МИНОБРНАУКИ РОССИИ
# ФГБОУВО «Пензенский Государственный Университет»
# Кафедра « Информационно-вычислительные системы»
ОТЧЁТ
# по лабораторной работе №9
# «Интерполяция экспериментальных данных в MathCad»
# Выполнил: ст.гр. 19ВИ1  Мельхов А.А.
# Проверил: ст.преподователь
# Голобокова Е.М
# Пенза, 2020
# Лабораторная работа №8
# Тема: «Интерполяция экспериментальных данных в MathCad»
# Вариант №13
# Цель работы: построить с помощью средств MathCad график функции, которая наилучшим образом отображает экспериментальную зависимость и которая представлена данными, которые приведены в таблице.
# 1. Набрать таблицу, которая соответствует варианту.
x := [1, 2, 3, 4, 5, 6, 7]
y := [2.46, 2.38, 2.79, 2.63, 2.86, 3.46, 4.32]
stack(x, y) = [1, 2, 3, 4, 5, 6, 7; 2.46, 2.38, 2.79, 2.63, 2.86, 3.46, 4.32]
# 2. Осуществить линейную интерполяцию, для чего необходимо выполнить следующие действия:
# 2.1. Ввести векторы данных х и у.
y := transpose(y)
x := transpose(x)
# 2.2. Определить функцию linterp (х,у, t ).
Z(t) := linterp(x, y, t)
# 2.3. Вычислить значения этой функции в точках, которые выбрать самостоятельно.
t := 0 .. 10
# 3. Построить график функции.
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# 4. Осуществить сплайн-интерполяцию, используя функцию interp (s,х,у, t), для чего необходимо выполнить следующие действия:
# 4.1. Ввести векторы данных х и у.
# 4.2. Ввести функцию cspline (х,у), которая определяет первый аргумент функции interp (s,х,у, t ), как векторную величину значений коэффициентов кубического сплайна.
s := cspline(x, y)
# 4.3. Определить функцию interp (s,х,у, t ).
G(t) := interp(s, x, y, t)
# 4.4. Вычислить значения этой функции в точках, которые задать такими же, как и для линейной интерполяции.
t := 0 .. 10
# 5. Построить график функции.
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# 6. Выполнить сравнительный анализ полученных разными подходами интерполяционных графиков и значений функции в одинаковых точках.
G(5) = 2.86
Z(5) = 2.86
# Значения одинаковы, но график немного отличается, у 2 график более плавный получается, в точках перегиба.
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# Вывод: мы познакомились в ходе выполнения лабораторной работы с линейной и сплайн-интерполяцией. Оба этих методов позволяют получать графики для функйии путём апроксимации. 2 более распространён, но сложнее реализован, зато красивее.
